######################################################
# Importation of the different required files
######################################################
import Sofa, numpy
from splib.constants import Key
from math import sin, cos, sqrt
from splib.animation import AnimationManager
# Importation of the different design's variables
# Discretization des poutres pour une division de 7
positionList=  [[0.003423230215944049, 0.006022613451855615, 0, -3.265265483357694e-05, 3.183590147299464e-05, -7.225301700406276e-06, 0.9999999989340372], [0.0, -74.93, -50.0, 0.0, 0.0, 0.0, 1.0], [64.89, 37.46, -50.0, 0.0, 0.0, 0.0, 1.0], [-64.89, 37.46, -50.0, 0.0, 0.0, 0.0, 1.0],
                [3.7732461203708056, -67.28303530596328, -42.34837078986425, 0.30932849931590245, -0.22527266388142683, 0.5438871253707012, 0.7468299011654077], [8.344987009107083, -60.139134008050945, -35.20521051629461, 0.3307958157176193, -0.19235319440438783, 0.4644246791125793, 0.798676464118807], [14.596352281645144, -53.302665290395545, -28.36966739356365, 0.33962401637042583, -0.17629059500388733, 0.4256520753593123, 0.8199984538765341], [21.40759234878376, -46.568674099492455, -21.63666332111222, 0.3396240163704257, -0.17629059500388738, 0.42565207535931243, 0.819998453876534], [27.65895762132179, -39.732205381837026, -14.801120198381243, 0.33079581571662275, -0.1923531944038326, 0.46442467911444774, 0.798676464118267], [32.2306985100581, -32.58830408392475, -7.657959924811641, 0.3093284993159024, -0.22527266388142686, 0.5438871253707012, 0.7468299011654076],
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                [-12.105589185864382, 44.20139788786531, -7.6534773993756975, -0.15523885998353307, -0.349771802849973, -0.097540800810787, 0.9187199652011939]]
edgesList= [[1, 4], [4, 5], [5, 6], [6, 7], [7, 8], [8, 9], [9, 0],
            [1, 10], [10, 11], [11, 12],
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  [39, 0]]
DOF0TransformNode0 = [[2.0002, 2.95826e-05, -7.14203e-05, 0.2706, -0.2706, 0.6533, 0.6533], [0, 0, 0, 0, 0, 0, 1], [0, 0, 0, 0, 0, 0, 1], [0, 0, 0, 0, 0, 0, 1], [0, 0, 0, 0, 0, 0, 1], [0, 0, 0, 0, 0, 0, 1], [0, 0, 0, 0, 0, 0, 1],
                      [-2.0002, -2.95826e-05, 7.14203e-05, 0.2706, -0.2706, 0.6533, 0.6533], [0, 0, 0, 0, 0, 0, 1], [0, 0, 0, 0, 0, 0, 1],
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  [0, 0, 0, 0, 0, 0, 1]]
DOF1TransformNode1 = [[0, 0, 0, 0, 0, 0, 1], [0, 0, 0, 0, 0, 0, 1], [0, 0, 0, 0, 0, 0, 1], [0, 0, 0, 0, 0, 0, 1], [0, 0, 0, 0, 0, 0, 1], [0, 0, 0, 0, 0, 0, 1], [34.0031, -24.932, -0.0021044, 0.2706, -0.2706, 0.6533, 0.6533],
                      [0, 0, 0, 0, 0, 0, 1], [0, 0, 0, 0, 0, 0, 1], [0, 0, 0, 0, 0, 0, 1],
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  [-4.58953, 41.9094, 0.000694121, -0.099, -0.3696, -0.2391, 0.8924]]
######################################################
# Definition of global variables
######################################################
stepTime=1.0e-1
gravity=0.0#-9.81e3
startingTime=0.1
indexPlatform=0
RouT=0
disMaxAct=70
stepDisplacement=0.5e-1
convergenceWaiting=0
toleranceConvergence=1.1e1
recordingBool=0
######################################################
# Definition of the python controller
######################################################
class PCRController(Sofa.PythonScriptController):

    def createGraph(self, node):
        # print('---------- Entering createGraph ----------')
        self.node = node
        # print('---------- Exiting createGraph  ----------')

    # def __init__(self, node):

    def reset(self):
        # print('---------- Entering reset ----------')
        self.time = 0.0
        self.MechPosList=self.node.RPCModel.MechanicalStructure.position
        self.RouT=RouT
        fA = open("forceAct.txt", "w")
        fA.close()
        Ts = open("TimeSim.txt", "w")
        Ts.close()
        self.stepDisplacement=stepDisplacement
        self.convergenceWaiting=convergenceWaiting
        self.recordingBool=0
        self.KxT=0
        self.KyT=0
        self.KzT=0
        self.KxR=0
        self.KyR=0
        self.KzR=0
        # print('---------- Exiting reset  ----------')
        return 0

    def onBeginAnimationStep(self, dt):
        self.time += dt
        MechPosList=self.node.RPCModel.MechanicalStructure.position
        if self.convergenceWaiting>toleranceConvergence:
            print(self.RouT,self.KzT,stepDisplacement)
            self.stepDisplacement+=stepDisplacement

            MechPosList[indexPlatform][0] = self.MechPosList[indexPlatform][0] + self.KxT*self.stepDisplacement
            MechPosList[indexPlatform][1] = self.MechPosList[indexPlatform][1] + self.KyT*self.stepDisplacement
            MechPosList[indexPlatform][2] = self.MechPosList[indexPlatform][2] + self.KzT*self.stepDisplacement
            MechPosList[indexPlatform][3] = self.MechPosList[indexPlatform][3] + self.KxR*self.stepDisplacement*1e-1
            MechPosList[indexPlatform][4] = self.MechPosList[indexPlatform][4] + self.KyR*self.stepDisplacement*1e-1
            MechPosList[indexPlatform][5] = self.MechPosList[indexPlatform][5] + self.KzR*self.stepDisplacement*1e-1

            self.node.RPCModel.MechanicalStructure.position=MechPosList
            print(self.node.RPCModel.MechanicalStructure.position[0])
            self.convergenceWaiting=0
        if self.convergenceWaiting==toleranceConvergence:
            forceActListBuf=[abs(self.node.RPCModel.Act1x.force), abs(self.node.RPCModel.Act1y.force), abs(self.node.RPCModel.Act2x.force),
                abs(self.node.RPCModel.Act2y.force), abs(self.node.RPCModel.Act3x.force), abs(self.node.RPCModel.Act3y.force)]
            # recording actuation forces
            fA = open("forceAct.txt", "a")
            fA.write(str((forceActListBuf)) + '\n')
            fA.close()
            Ts = open("TimeSim.txt", "a")
            Ts.write(str((self.time)) + '\n')
            Ts.close()
        self.convergenceWaiting+=1
        # print('---------- Exiting onBeginAnimationStep  ----------')
        return 0

    def onKeyPressed(self, key):
        print("Key Pressed")
        if key == Key.leftarrow: # mouvements suivant l'axe X
            if self.RouT == 1:
                self.KxT=-1
                self.KxR=0
                print("X negative translation")
            else:
                self.KxR=-1
                self.KxT=0
                print("X negative rotation")

        elif key == Key.rightarrow:
            if self.RouT == 1:
                self.KxT=1
                self.KxR=0
                print("X positive translation")
            else:
                self.KxR=1
                self.KxT=0
                print("X positive rotation")

        if key == Key.uparrow:   # mouvements suivant l'axe Z
            if self.RouT == 1:
                self.KyT=1
                self.KyR=0
                print("Y positive translation")
            else:
                self.KyR=1
                self.KyT=0
                print("Y positive rotation")
        elif key == Key.downarrow:
            if self.RouT == 1:
                self.KyT=-1
                self.KyR=0
                print("Y negative translation")
            else:
                self.KyR=-1
                self.KyT=0
                print("Y negative rotation")

        if key == Key.plus:      # mouvements suivant l'axe Y
            if self.RouT == 1:
                self.KzT=1
                self.KzR=0
                print("Z positive translation")
            else:
                self.KzR=1
                self.KzT=0
                print("Z positive rotation")
        elif key == Key.minus:
            if self.RouT == 1:
                self.KzT=-1
                self.KzR=0
                print("Z negative translation")
            else:
                self.KzR=-1
                self.KzT=0
                print("Z negaive rotation")

        if key == Key.T:      # mouvements suivant l'axe Y
            self.RouT=1 # Translation
            print("Translations considered")
        elif key == Key.R:
            self.RouT=0 # Rotation
            print("Rotation considered")

######################################################
# Definition of the scene
######################################################
def createScene(rootNode):
    print('---------- Entering createScene ----------')
    rootNode.createObject('RequiredPlugin',pluginName='SoftRobots BeamAdapter SofaPython SofaSparseSolver')
    rootNode.createObject('VisualStyle',displayFlags='showVisualModels showBehaviorModels showCollisionModels hideBoundingCollisionModels showForceFields showInteractionForceFields hideWireframe')
    rootNode.createObject('BackgroundSetting', color=[0.0, 0.0, 0.0, 1.0])
    # rootNode.createObject('FreeMotionAnimationLoop')
    AnimationManager(rootNode)
    rootNode.dt = stepTime
    rootNode.gravity = [0.0, -gravity, 0.0]

    # Declaration of the use of the inverse computation
    # rootNode.createObject('QPInverseProblemSolver')

    # Creation of the Python controller
    rootNode.createObject('PythonScriptController', classname="PCRController")

    # Creation of the RPC model
    RPCModelNode=rootNode.createChild('RPCModel')
    # Definition of the solvers, the convergence parameters and the contrains correction
    RPCModelNode.createObject('EulerImplicitSolver', rayleighStiffness=0.0, printLog=False, rayleighMass=0.0)
    RPCModelNode.createObject('SparseLDLSolver', name='ldl')
    RPCModelNode.createObject('GenericConstraintCorrection', name='GCC', solverName='ldl')

    # Definition of the different points that constitued the robot
    RPCModelNode.createObject('MechanicalObject', name='MechanicalStructure', template='Rigid3d', showObject='true', position=positionList, showObjectScale='0.01')
    # Definition of the existing link between the different points that constituted the robot
    RPCModelNode.createObject('MeshTopology', edges=edgesList)
    # Creation of the beam between the different elements and the relation between the the defined position and the corresponding clamping points
    RPCModelNode.createObject('BeamInterpolation', name='interpolation', crossSectionShape='circular', radius='0.5', innerRadius='0.0',
        dofsAndBeamsAligned='false', defaultYoungModulus='160e6', DOF0TransformNode0=DOF0TransformNode0, DOF1TransformNode1=DOF1TransformNode1)
    RPCModelNode.createObject('AdaptiveBeamForceFieldAndMass', massDensity=8e-6, name='LinkForceField', interpolation='@interpolation', reinforceLength=1)

    # Definition of the different fixed and clamping points of the robotic structure
    RPCModelNode.createObject('PartialFixedConstraint', name='ConstraintPlat', indices='0', fixedDirections='1 1 1 1 1 1')
    RPCModelNode.createObject('PartialFixedConstraint', name='ConstraintAct1', indices='1', fixedDirections='0 0 1 1 1 1')
    RPCModelNode.createObject('PartialFixedConstraint', name='ConstraintAct2', indices='2', fixedDirections='0 0 1 1 1 1')
    RPCModelNode.createObject('PartialFixedConstraint', name='ConstraintAct3', indices='3', fixedDirections='0 0 1 1 1 1')


    # Definition of the different masses of the different physical component of the robot
    RPCModelNode.createObject('UniformMass', name='MassPlat', indices='0', totalMass='0.004', showAxisSizeFactor='0.001')
    RPCModelNode.createObject('UniformMass', name='MassAct1', indices='1', totalMass='0.0036', showAxisSizeFactor='0.001')
    RPCModelNode.createObject('UniformMass', name='MassAct2', indices='2', totalMass='0.0036', showAxisSizeFactor='0.001')
    RPCModelNode.createObject('UniformMass', name='MassAct3', indices='3', totalMass='0.0036', showAxisSizeFactor='0.001')

    # Actuation variables
    deplacementActionneurx=70     #mm
    deplacementActionneury=70     #mm
    SetpDeplacementActionneur=0.1 #mm
    forceActionneur=20e3            #(Kg*mm)/s^2
    # Definition of the different actuators
    PosAct1x = RPCModelNode.createObject('SlidingActuator', name='Act1x',template='Rigid3d', indices='1', direction='1 0 0 0 0 0', maxForce=forceActionneur, minForce=-forceActionneur, maxDispVariation=SetpDeplacementActionneur, maxPositiveDisp=deplacementActionneurx, maxNegativeDisp=deplacementActionneurx)
    PosAct1y = RPCModelNode.createObject('SlidingActuator', name='Act1y',template='Rigid3d', indices='1', direction='0 1 0 0 0 0', maxForce=forceActionneur, minForce=-forceActionneur, maxDispVariation=SetpDeplacementActionneur, maxPositiveDisp=deplacementActionneury, maxNegativeDisp=deplacementActionneury)
    PosAct2x = RPCModelNode.createObject('SlidingActuator', name='Act2x',template='Rigid3d', indices='2', direction='1 0 0 0 0 0', maxForce=forceActionneur, minForce=-forceActionneur, maxDispVariation=SetpDeplacementActionneur, maxPositiveDisp=deplacementActionneurx, maxNegativeDisp=deplacementActionneurx)
    PosAct2y = RPCModelNode.createObject('SlidingActuator', name='Act2y',template='Rigid3d', indices='2', direction='0 1 0 0 0 0', maxForce=forceActionneur, minForce=-forceActionneur, maxDispVariation=SetpDeplacementActionneur, maxPositiveDisp=deplacementActionneury, maxNegativeDisp=deplacementActionneury)
    PosAct3x = RPCModelNode.createObject('SlidingActuator', name='Act3x',template='Rigid3d', indices='3', direction='1 0 0 0 0 0', maxForce=forceActionneur, minForce=-forceActionneur, maxDispVariation=SetpDeplacementActionneur, maxPositiveDisp=deplacementActionneurx, maxNegativeDisp=deplacementActionneurx)
    PosAct3y = RPCModelNode.createObject('SlidingActuator', name='Act3y',template='Rigid3d', indices='3', direction='0 1 0 0 0 0', maxForce=forceActionneur, minForce=-forceActionneur, maxDispVariation=SetpDeplacementActionneur, maxPositiveDisp=deplacementActionneury, maxNegativeDisp=deplacementActionneury)

    # Monitors management
    RPCModelNode.createObject('Monitor',    name='PlatM', template='Rigid3', listening="1", indices="0", showTrajectories="1", TrajectoriesPrecision="0.01", TrajectoriesColor="0 0 1 1", sizeFactor="1", ExportPositions="true", ExportVelocities="true",ExportForces="true")
    RPCModelNode.createObject('Monitor', name='SldActM1', template='Rigid3', listening="1", indices="1", showTrajectories="0", TrajectoriesPrecision="0.01", TrajectoriesColor="0 0 1 1", sizeFactor="1", ExportPositions="true", ExportVelocities="true",ExportForces="true")
    RPCModelNode.createObject('Monitor', name='SldActM2', template='Rigid3', listening="1", indices='2', showTrajectories="0", TrajectoriesPrecision="0.01", TrajectoriesColor="0 0 1 1", sizeFactor="1", ExportPositions="true", ExportVelocities="true",ExportForces="true")
    RPCModelNode.createObject('Monitor', name='SldActM3', template='Rigid3', listening="1", indices='3', showTrajectories="0", TrajectoriesPrecision="0.01", TrajectoriesColor="0 0 1 1", sizeFactor="1", ExportPositions="true", ExportVelocities="true",ExportForces="true")

######################################################
# Visual Definition
######################################################

    VisuRigidNode = RPCModelNode.createChild('Platform')
    # VisuRigidNode.createObject('MeshSTLLoader', filename='plataforme.stl', name='loader', translation='0 0 0', rotation='0.0 0.0 180', scale3d='1 1 1')
    VisuRigidNode.createObject('MeshSTLLoader', filename='plt_vben_vblend.stl', name='loader', translation='0 0 0', rotation='0.0 0.0 180', scale3d='1 1 1')
    VisuRigidNode.createObject('OglModel', src='@loader', name='visuPlatform')
    VisuRigidNode.createObject('RigidMapping', output='@visuPlatform', index='0')

    VisuRigidNode1 = RPCModelNode.createChild('Act1')
    VisuRigidNode1.createObject('MeshSTLLoader', filename='base_central.stl', name='loader', translation='0 0 0', rotation='0.0 0.0 180', scale3d='1 1 1')
    VisuRigidNode1.createObject('OglModel', src='@loader', name='visuBC')
    VisuRigidNode1.createObject('RigidMapping', output='@visuBC', index='1')

    VisuRigidNode2 = RPCModelNode.createChild('Act2')
    VisuRigidNode2.createObject('MeshSTLLoader', filename='base_droite.stl', name='loader', translation='0 0 0', rotation='0.0 0.0 180.0', scale3d='1 1 1')
    VisuRigidNode2.createObject('OglModel', src='@loader', name='visuBD')
    VisuRigidNode2.createObject('RigidMapping', output='@visuBD', index='2')

    VisuRigidNode3 = RPCModelNode.createChild('Act3')
    VisuRigidNode3.createObject('MeshSTLLoader', filename='base_gauche.stl', name='loader', translation='0 0 0', rotation='90 0.0 -90.0', scale3d='1 1 1')
    VisuRigidNode3.createObject('OglModel', src='@loader', name='visuBG')
    VisuRigidNode3.createObject('RigidMapping', output='@visuBG', index='3')


    print('---------- Exiting createScene ----------')
    return rootNode
